OpenVSP model (file version 5), 6 components.
Geometry view with OpenVSP parameter names; values to 6 digits, angles in degrees, lengths in the model's unit.
Overall bounding box: X_Min=-6.84783 X_Len=20 Y_Min=-17.1801 Y_Len=34.3602 Z_Min=-2 Z_Len=6.92708

Wing "Wing"
  location (X Y Z) 0 0 0, rotation 0 0 0
  symmetric about XZ
  bounding box size 3 34.3602 0.360163
  totals: TotalSpan=34 TotalProjectedSpan=34 TotalChord=3 TotalArea=102 TotalAR=11.3333 MAC=3
  root: chord 3, twist 0, NACA 4-series Camber=0 CamberLoc=0.4 ThickChord=0.12
  sections:
    n  Span  Root_Chord  Tip_Chord  Area  Sweep  Sweep_Location  Dihedral  Twist  Twist_Location  tip airfoil
    1  17    3           3          51    0      0               0         0      0.25            as above

Wing "SubWing", child of "Wing"
  location (X Y Z) 3.60656 0 0, rotation 0 0 0
  symmetric about XZ
  bounding box size 2 10.8571 0.200116
  totals: TotalSpan=10.8571 TotalProjectedSpan=10.8571 TotalChord=2 TotalArea=21.7143 TotalAR=5.42857 MAC=2
  root: chord 2, twist 0, NACA 4-series Camber=0 CamberLoc=0.2 ThickChord=0.1
  sections:
    n  Span     Root_Chord  Tip_Chord  Area     Sweep  Sweep_Location  Dihedral  Twist  Twist_Location  tip airfoil
    1  5.42857  2           2          10.8571  0      0               0         0      0.25            as above
  SS_Control "SS_CONT_0": UStart=0.4 UEnd=0.6 Length_C_Start=0.25 Length_C_End=0.25 Length_Start=0.5 Length_End=0.5 LE_Flag=0 Surf_Type=2

Pod "Fuse"
  location (X Y Z) -6.84783 0 0, rotation 0 0 0
  bounding box size 20 4 4
  Design: FineRatio=10 Length=20

Pod "Cabin", child of "Fuse"
  location (X Y Z) -5.32609 0 0.869565, rotation 0 0 0
  bounding box size 6.90909 2.76364 2.76364
  Design: FineRatio=5 Length=6.90909

Wing "HorStab"
  location (X Y Z) 9.01639 0 0, rotation 0 0 0
  symmetric about XZ
  bounding box size 3.96007 10.254 0.300174
  totals: TotalSpan=10.254 TotalProjectedSpan=10.254 TotalChord=2 TotalArea=20.5079 TotalAR=5.12698 MAC=2.16667
  root: chord 3, twist 0, NACA 4-series Camber=0 CamberLoc=0.2 ThickChord=0.1
  sections:
    n  Span     Root_Chord  Tip_Chord  Area    Sweep  Sweep_Location  Dihedral  Twist  Twist_Location  tip airfoil
    1  5.12698  3           1          10.254  30     0               0         0      0.25            as above

Wing "VertStab"
  location (X Y Z) 8.85246 0 0.327869, rotation 90 0 0
  bounding box size 4.05218 0.277939 4.59921
  totals: TotalSpan=4.59921 TotalProjectedSpan=4.59921 TotalChord=2.0873 TotalArea=9.59993 TotalAR=2.20342 MAC=2.16344
  root: chord 2.77778, twist 0, NACA 4-series Camber=0 CamberLoc=0.2 ThickChord=0.1
  sections:
    n  Span     Root_Chord  Tip_Chord  Area     Sweep  Sweep_Location  Dihedral  Twist  Twist_Location  tip airfoil
    1  4.59921  2.77778     1.39683    9.59993  30     0               0         0      0.25            as above

VSPAERO settings (reference component "Wing"): Sref=102 bref=34 cref=3 Xcg=0 Ycg=0 Zcg=0 AlphaStart=0 AlphaEnd=2 AlphaNpts=2 BetaStart=0 BetaEnd=0 BetaNpts=1 MachStart=0 MachEnd=0 MachNpts=1 ReCref=1e+07 Vinf=100 Rho=0.002377
